# Параметры полевого транзистора
Q_g := 30*10^-9
Q_gs := 9*10^-9
Q_gd := 18*10^-9
R_DS := 0.85  # Сопротивление сток-исток транзистора
C_boost := 4.7*10^-6  # Емкость бустерного конденсатора [F]
# I часть, UC3843
U_loadNom := 100  # Напряжение нагрузки [V]
U_loadMax := 310  # Максимальное напряжение нагрузки
i_load := 0.005  # Ток нагрузки [A]
U_supply := 12  # Напряжение питания бустерной схемы, [V]
# 1. Задание частоты генератора UC3843
R_T := 7.5*10^3
C_T := 2200*10^-12  # Частотозадающие параметры генератора ИС uc3843 [Ohm, F]
τ_osc := R_T*C_T = 1.65e-5  # Постоянная времени
f_osc := 1.72/(R_T*C_T) = 104242  # Частота генератора ИС uc3843 [Hz]
t_period := 1/f_osc = 9.59302e-6  # Период тактовой частоты генератора
t_dead := 0.65*10^-6  # Мертвое время (из графика в даташите для конд 2,2 нФ
Dc_max := 1 - t_dead/t_period = 0.932242  # Максимальный рабочий цикл
t_openMax := t_period*Dc_max = 8.94302e-6  # Максимальное время открытия
L := 100*10^-6  # Дроссель [H]
I_Lmax := U_supply*t_openMax/L = 1.07316  # Максимальный ток на дросселе при данной частоте генератора и частотозад C и R
# Максимальное напряжение на конденсаторе, если заряжать его за 1 цикл (нам это не надо)
U_OUTPUT := U_supply*t_openMax/(t_period - t_openMax)
U_OUTPUT = 165.102
# 2. Контроль тока
V_ISENSE := 1  # Пороговое напряжение, соотв пороговому току
R_CS := 1  # Шунт контроля тока
I_SENSEMAX := V_ISENSE/R_CS = 1  # Ограничение тока через дроссель
P_RCS := I_SENSEMAX^2*R_CS = 1  # Мощность, рассеиваемая на тококонтролирующем резисторе
# Выбран резистор с мощность 2Вт.
t_1 := 10*10^3*0.01*10^-6 = 0.0001  # Постоянная времени генератора (в примере из даташита)
# 2.1 Расчет RC-фильтра на входе контроля тока
1.72/(10*10^3*0.01*10^-6) = 17200  # Частота генератора (в примере из даташита)
R_CSF := 510
C_CSF := 150*10^-12
# Постоянная времени RC-фильтра. В даташите сказано, что она дб значительно меньше периода генератора (получилось в 20 раз)
t_2 := 1*10^3*470*10^-12 = 4.7e-7  # Постоянная времени RC-фильтра пина Current Sense (в примере из даташита)
τ_CSF := R_CSF*C_CSF = 7.65e-8
τ_osc/τ_CSF = 215.686
t_1/t_2 = 212.766  # Отношение постоянных времени (в примере из даташита)
P_RcsUC3843 := V_ISENSE^2/R_CSF = 0.00196078  # Рассеиваемая мощность на R
# 3. Средний потребляемый ток VCC (собственное потребление микросхемы UC3843)
I_OUTPUT := Q_g*f_osc = 0.00312727
# 4. Обратная связь по напряжению UC3843
# Номиналы резисторов делителя напряжений обратной связи ИС uc3843 [Ohm]
# Верхнее плечо | Среднее (переменное) | Нижнее плечо
R_1back := 1.2*10^6
R_2backPot := 20*10^3
R_3back := 10*10^3
U_backStop := 2.5  # Пороговое напряжение обратной связи, если выше него - ШИМ уменьшается
# 4.1 Расчет диапазона выходного напряжения повышающего преобразователя
U_outMin := U_backStop*(R_1back + R_2backPot + R_3back)/(R_2backPot + R_3back) = 102.5
# Минимальное напряжение на выходе преобразователя для данных параметров делителя
# РАССЧИТАТЬ С УЧЕТОМ ДОПУСКОВ!!!
U_outMax := U_backStop*(R_1back + R_2backPot + R_3back)/R_3back = 307.5  # Максимальное напряжение на выходе преобразователя для данных параметров делителя
I_backMax := U_outMax/(R_1back + R_2backPot + R_3back) = 0.00025  # Максимальный ток через делитель напряжения
# 4.2 Расчет диапазона выходного напряжения с учетом погрешностей номиналов резисторов делителя напряжений обратной связи
δR_1back := 0.01
δR_2backPot := 0.1
δR_3back := 0.01  # Допустимое отклонение
# 4.2.1 Крайние значения номиналов резисторов с учетом допустимых отклонений
R_1backMin := R_1back*(1 - δR_1back) = 1188000
R_1backMax := R_1back*(1 + δR_1back) = 1212000
R_2backPotMin := R_2backPot*(1 - δR_2backPot) = 18000
R_2backPotMax := R_2backPot*(1 + δR_2backPot) = 22000
R_3backMin := R_3back*(1 - δR_3back) = 9900
R_3backMax := R_3back*(1 + δR_3back) = 10100
U_outMinWithTolerance := U_backStop*(R_1backMin + R_2backPotMax + R_3backMax)/(R_2backPotMax + R_3backMax) = 95.0234
U_outMaxWithTolerance := U_backStop*(R_1backMax + R_2backPotMax + R_3backMin)/R_3backMin = 314.116
P_max1 := I_backMax^2*R_1back = 0.075  # Рассеиваемые мощности на резисторах делителя
P_max2 := I_backMax^2*R_2backPot = 0.00125
P_max3 := I_backMax^2*R_3back = 0.000625
# Выбраны резисторы с рассеиваемой мощностью соответственно: 0,25Вт, 0,5Вт, 0,125Вт
# 5. Расчет тока зарядки MOSFET ключа МС uc3843
C_oss := 56*10^-12
C_iss := 1018*10^-12  # Входная емкость полевого транзистора
T_riseTimeUC3843 := 50*10^-9
T_fallTimeUC3843 := 50*10^-9
I_chargeGate := C_iss*U_supply/T_riseTimeUC3843 = 0.24432  # Средний ток заряда затвора транзистрора
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# 6. Расчет выходного конденсатора
δV_OUTPUT := 0.3  # Желаемые пульсации напряжения на выходе
C_theory := I_SENSEMAX/(f_osc*δV_OUTPUT) = 3.19767e-5
# Выбран конденсатор 33мкФ
ESR := δV_OUTPUT/I_SENSEMAX = 0.3
# II часть, IR2110
V_CC := 12  # Напряжение питания силовой части IR2110
I_LK := 50*10^-6  # Ток утечки (ток покоя) для цепи верхнего ключа
I_qbsMax := 230*10^-6  # Ток покоя Vbs
V_BSUV := 8.6  # Under Voltage LockOut Threshold
f_sw := 200  # Зададим частоту работы верхнего ключа
Q_ls := 5*10^-9  # Требуемый заряд сдвига уровня за цикл
I_CbsLeak := 0  # Ток утечки кноденсатора (для всех, кроме электролитич = 0)
# 1. Расчет и выбор бустрепного диода
Q_bs := 2*Q_g + I_qbsMax/f_sw + Q_ls = 1.215e-6
I_peakRevertDiode := Q_bs*f_sw = 0.000243
# Выбран диод Шоттки SK34A с максимальным обратным током 500мкА, падением напряжения 0,55В
V_BootDiode := 0.55  # Падение напряжения на бустерном диоде (выбранном выше)
# 1. Расчет бутстрепного конденсатора
# 1.1 Первый способ расчета бутстрепного конденсатора
# документ Bootstrap Circuitry Selection for Half-Bridge
V_Q1g := V_CC - V_BootDiode
C_g := Q_g/V_Q1g = 2.62009e-9  # Емкость затвора полевого транзистора
# Минимальное значение бутстрепного конденсатора дб больше Cg не менее, чем в 10 раз
C_1 := C_g*10 = 2.62009e-8
# 1.2 Второй способ расчета бутстрепного конденсатора (тот же документ)
Q_total := Q_g + I_LK*Dc_max/f_sw + I_qbsMax/f_sw = 1.41306e-6
δV_b := V_CC - V_BootDiode - V_BSUV = 2.85
C_2 := Q_total/δV_b = 4.95811e-7
# 1.3 Третий способ расчета бутстрепного конденсатора (Bootstrap Component Selection For Control IC’s - International Rectifier)
I_loadMax := 70*10^-6  # Максимальный ток на нагрузке
R_sense := 10  # Сопротивление шунта на входе ОУ
R_human := 1*10^3  # Принимаемое сопротивление человека
V_LS := I_loadMax*R_human = 0.07  # Падение напряжения на нагрузке
U2 := U_outMaxWithTolerance*R_sense/(R_sense + R_human) = 3.11006
V_min := 10  # Минимальное напряжение между Vb и Vs
# Это Vgs(threshold)
C_3 := 2*(2*Q_g + I_qbsMax/f_sw + Q_ls + I_CbsLeak/f_sw)/(V_CC - V_BootDiode - V_LS - V_min) = 1.76087e-6
C_3boost := C_3*15 = 2.6413e-5
# Выбран танталовый электролитический конденсатор 33мкФ, 35В
# 2. Токоограничивающий резистор затвора на IR2110
U_gs := 12  # Напряжение затвор-исток
T_riseTimeIR2110 := 35*10^-9
# Из даташита на IR2110
T_fallTimIR2110 := 25*10^-9
f_max := 1/(T_riseTimeIR2110*T_fallTimIR2110) = 1.14286e15
C_iss = 1.018e-9
I_gate := C_iss*U_gs/T_riseTimeIR2110 = 0.349029  # Максимальный ток затвора
R_gate := 47
# Ограничитель тока на затворе транзистора
R := U_gs/I_gate = 34.3811
I_realGate := U_gs/R_gate = 0.255319  # Реальный ток на затворе
t_realRiseTimeIR2110 := C_iss*U_gs/I_realGate = 4.7846e-8  # 47 нс
f_real := 1/(2*t_realRiseTimeIR2110) = 10450194  # Максимально возможная частота переключения
P_Rgate := Q_total*U_supply*f_sw = 0.00339135  # Рассеиваемая мощность на затворном резисторе
# 3. Расчет токоограничивающего резистора в выходной цепи на нагрузку
# Безопасным значением тока для человека считается 50мкА
I_safe := 50*10^-6
R_limit := U_loadMax/I_safe = 6200000
P_Rlimit := I_safe^2*R_limit = 0.0155
# Выбран резистор 6,2М, 0,125Вт
l := 50*sqrt(5/2.5) = 70.7107
R := U_loadMax/l = 4.38406
# 4.1 Расчет шунта для регистрации с последующим усилением сигнала
# В расчетах сопротивление тела человека как правило принимают за 1кОм. Пусть Umax на шунте UoutSense = 3В, тогда RampSense = 10 Ом
U_outSense := 3
# Для формула делителя напряжения найдем требуемое сопротивление шунта нижнего плеча
R_ampSense := U_outSense*R_human/(U_loadMax - U_outSense) = 9.77199
P_Rsense := I_safe^2*R_ampSense = 2.443e-8
# Выбран резистор 10 Ом, 0,125 Вт
# 4.2 Шум-помехи инструментального усилителя INA122P
δV := 40*10^-9/sqrt(f_sw) = 2.82843e-9  # [В]
# 5. Дополнительная нагрузка входа питания 5В - защита от шума
U_input := 5
I_load := 33*10^-3
R_load := U_input/I_load = 151.515
P_load := I_load^2*R_load = 0.165
# Ниже - старое
# Расчет по руководству из AND9674/D (ON Semiconductor)
Duty := 50  # Процент заполнения
t_ON := 1/(f_sw*100/Duty) = 0.0025
I_LKCAP := 0  # У керамич он равен нулю
I_LKGS := 100*10^-9  # Gate - Source Leakage Current
I_LK := 50*10^-6  # Offset Supply Leakage Current
I_LKDIODE := 5*10^-6  # Ток утечки через диод при обратном напряжении
Q_LS := 5*10^-9
Q_total := Q_g + (I_LKCAP + I_LKGS + I_LK + I_LKDIODE)*t_ON + Q_LS = 1.7275e-7
V_CC := 12
V_F := 1.1
V_GSMIN := 2  # ???????????
V_boot := V_CC - V_F - V_GSMIN = 8.9
C_boot := Q_total/V_boot = 1.94101e-8  # 0.036мкФ
# Здесь подойдет керамич конденсатор 0.47мкФ
# Расчет снабберного конденсатора:
I_maxLoad := 50*10^-6
t_f := 19*10^-9
U_max := 310
CC := I_maxLoad*t_f/U_max = 3.06452e-15
